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/batch
! ANSYS input file written by Workbench version 2023 R1
! File used for geometry attach: C:\FE_models\Fisicas\perforated_plate\WB\perforated_plate_validation_files\dp0\SYS\DM\SYS.scdoc
/title,perforated_plate_validation--Harmonic Acoustics (A5)
/COM,/COM,     ANSYSMotion, 2023.1
/com,--- Data in consistent MKS units. See Solving Units in the help system for more information.
/units,MKS
/prep7
! Turn off shape checking because checks already performed inside WB mesher.
! See help system for more information.
SHPP,OFF,,NOWARN
etcon,set             ! allow ANSYS to choose best KEYOP's for 180x elements, resets any applicable keyopt to MAPDL defaults
/com,*********** Nodes for the whole assembly ***********
nblock,3,,5976
(1i9,3e20.9e3)
        1     0.000000000E+00     1.500000000E-01     1.000000000E-01
        2     0.000000000E+00    -1.500000000E-01     1.000000000E-01
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-1
/com,*********** Elements for Body 1 "Component1\Ressalto-extrus_o2" ***********
et,1,30
r,1,2.e-005,101325.
keyo,1,2,1          ! uncoupled acoustic element without FSI
eblock,19,solid,,13011
(19i9)
        1        1        1        1        0        0        0        0        8        0        1     1988     3142     3680     3680     3402     3402     3402     3402
        1        1        1        1        0        0        0        0        8        0        2     1988     2980     3680     3680     3142     3142     3142     3142
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-1
/com,*********** Elements for Body 2 "Component2\Ressalto-extrus_o1" ***********
et,2,30
r,2,2.e-005,101325.
keyo,2,2,1          ! uncoupled acoustic element without FSI
eblock,19,solid,,13208
(19i9)
        2        2        2        2        0        0        0        0        8        0    13012     3759     5433     4037     4037     4457     4457     4457     4457
        2        2        2        2        0        0        0        0        8        0    13013     3759     4059     5433     5433     4457     4457     4457     4457
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-1
/com,*********** Send User Defined Coordinate System(s) ***********
csys,0
toffst,273.15,  ! Temperature offset from absolute zero
/com,*********** Set Reference Temperature ***********
tref,22.
/com,*********** Send Materials ***********
MP,MURX,1,1,
MP,DENS,1,1.204263,	! kg m^-3
MP,SONC,1,343.395034,	! m s^-1
MP,VISC,1,1.8247e-05,	! Pa s
MP,KXX,1,0.025503,	! W m^-1 C^-1
MP,C,1,1006.400178,	! J kg^-1 C^-1

MP,MURX,2,1,
MP,DENS,2,1.204263,	! kg m^-3
MP,SONC,2,343.395034,	! m s^-1
MP,VISC,2,1.8247e-05,	! Pa s
MP,KXX,2,0.025503,	! W m^-1 C^-1
MP,C,2,1006.400178,	! J kg^-1 C^-1

!************************* Model Summary ********************
!Component1\Ressalto-extrus_o2,	Air_20C,	matid,	1
!Component2\Ressalto-extrus_o1,	Air_20C,	matid,	2
!************************* End Model Summary ********************
/com,*********** Send Named Selection as Node Component ***********
CMBLOCK,OUTPUT_FACE,NODE,       73
(8i10)
       177       207       208       209       210       211       212       213
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/com,*********** Send Named Selection as Node Component ***********
CMBLOCK,INPUT_FACE,NODE,       71
(8i10)
        11        41        42        43        44        45        46        47
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/com,*********** Send Named Selection as Node Component ***********
CMBLOCK,MIDDLE_FACE,NODE,       71
(8i10)
         1         2         3         4         5         6         7         8
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/com,*********** Send Named Selection as Node Component ***********
CMBLOCK,INPUT_EDGES,NODE,       30
(8i10)
        11        41        42        43        44        45        46        47
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/com,*********** Send Named Selection as Node Component ***********
CMBLOCK,OUTPUT_EDGES,NODE,       30
(8i10)
       177       207       208       209       210       211       212       213
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/com,*********** Send Named Selection as Node Component ***********
CMBLOCK,INPUT_CONNECTED_FACES,NODE,      907
(8i10)
         1         2         3         4         5         6         7         8
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/com,*********** Send Named Selection as Node Component ***********
CMBLOCK,OUTPUT_CONNECTED_FACES,NODE,      941
(8i10)
         1         2         3         4         5         6         7         8
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
/com,*********** Create Impedance Boundary ***********
CMBLOCK,_CMACOUSTICSFIMPD47,NODE,      144
(8i10)
        11        41        42        43        44        45        46        47
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
cmsel,s,_CMACOUSTICSFIMPD47
sf,_CMAcousticSFIMPD47,impd,413.538,0       ! Impedance
allsel,all


/com,*********** Begin Program Controlled Acoustic Far-field Radiation Surface ***********

esel,s,type,,1
esel,a,type,,2
CMBLOCK,_CM_EQV_SRC_SURFACE167,NODE,      144
(8i10)
        11        41        42        43        44        45        46        47
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
cmsel,s,_CM_EQV_SRC_SURFACE167
sf,_CM_EQV_SRC_SURFACE167,mxwf,
allsel,all


/com,*********** End Program Controlled Acoustic Far-field Radiation Surface ***********


/com,*********** Create Surface Velocity ***********
CMBLOCK,_CMACOUSTICSURFVELO56,NODE,       71
(8i10)
        11        41        42        43        44        45        46        47
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cmsel,s,_CMACOUSTICSURFVELO56
sf,_CMAcousticSURFVELO56,shld,1,0
allsel,all

fini
/solu
antype,harm
hropt,auto
thexpand,off     ! ignore thermal strains
kbc,1
harfrq,0,1400
nsub,280
asol,scat,off
outres,erase
outres,all,none
outres,nsol,all
outres,eangl,all
outres,etmp,all
outres,veng,all
esel,s,mat,,1
esel,a,mat,,2
cm,_elmisc,elem
esel,all
outres,misc,all,_elmisc
outres,fgrad,all
! *********** WB SOLVE COMMAND ***********
! check interactive state
*get,ANSINTER_,active,,int
*if,ANSINTER_,ne,0,then
/eof
*endif
solve
/com *************** Write FE CONNECTORS *********
CEWRITE,file,ce,,INTE
fini
*get,_NSOLTHREADS,active,0,ntfs
*get,_NSOLPROCESSES,active,0,npfs
/post1
! ****** Begin Command Snippet ******
!   Commands inserted into this file will be executed immediately after the ANSYS /POST1 command.

!   Active UNIT system in Workbench when this object was created:  Metric (m, kg, N, s, V, A)
!   NOTE:  Any data that requires units (such as mass) is assumed to be in the consistent solver unit system.
!                See Solving Units in the help system for more information.

N_FREQ = 280
N_COLF = 1 + 2*N_FREQ
N_COLV = 1 + 6*N_FREQ

!
*dim,ratio,ARRAY,N_FREQ,1
*DIM,frequencies,ARRAY,N_FREQ,1
!
CMSEL,S,'input_face',NODE
CM,LIST_NODES,NODE
!
*GET,N_NODES_IF,NODE,,COUNT
*GET,N_MAX_IF,NODE,,num,max
!
*DIM,nodal_area_input,ARRAY,N_NODES_IF,2
*DIM,PRESSURE_IF,ARRAY,N_NODES_IF,N_COLF
*DIM,VELOCITY_IF,ARRAY,N_NODES_IF,N_COLV
*DIM,mask_IF,array,N_MAX_IF
*DIM,NODES_NS_IF,ARRAY,N_NODES_IF,1
*DIM,NODES_ID_FULL_IF,ARRAY,N_MAX_IF,1
*DIM,data_full_IF,array,N_MAX_IF,N_COLF
*DIM,data_full_VIF,array,N_MAX_IF,N_COLV
!
*VGET,NODES_NS_IF,NODE,,NLIST
*VGET,mask_IF(1),NODE,,NSEL
*VFILL,NODES_ID_FULL_IF,ramp,1,1

!Harmonic Analysis create a 2*Nf set of results (Real part + Imaginary part)

!PRAS, LWIN, 1, all, , , OB0, --, 51, , , 2.634167, 225.307464
!PRAS, LWOUT, 1, all, , , OB0, --, 51, 52, , 2.634167, 225.307464
!PRAS, PALL, 1, all, , , OB0, --, 51, 52, , 2.634167, 225.307464

*DO,I,1,N_FREQ,1

! STORE REAL PART OF DISPLACEMENT

SET,1,I,,0

!PRAS, LWIN, 1, I, , , OB0, --, 51, , , 2.634167, 225.307464

*GET, frequencies(I,1), ACTIVE, 0, SET, FREQ,

*VMASK,mask_IF(1)
*VGET,data_full_IF(1,2+(I-1)*2),NODE,all,PRESS,

*VMASK,mask_IF(1)
*VGET,data_full_VIF(1,2+(I-1)*6),NODE,all,PG,X

*VMASK,mask_IF(1)
*VGET,data_full_VIF(1,4+(I-1)*6),NODE,all,PG,Y

*VMASK,mask_IF(1)
*VGET,data_full_VIF(1,6+(I-1)*6),NODE,all,PG,Z

! STORE IMAGINARY PART OF DISPLACEMENT

SET,1,I,,1

*VMASK,mask_IF(1)
*VGET,data_full_IF(1,3+(I-1)*2),NODE,all,PRESS,

*VMASK,mask_IF(1)
*VGET,data_full_VIF(1,3+(I-1)*6),NODE,all,PG,X

*VMASK,mask_IF(1)
*VGET,data_full_VIF(1,5+(I-1)*6),NODE,all,PG,Y

*VMASK,mask_IF(1)
*VGET,data_full_VIF(1,7+(I-1)*6),NODE,all,PG,Z


*VMASK,mask_IF(1)
*VFUN,PRESSURE_IF(1,2+(I-1)*2),COMP,data_full_IF(1,2+(I-1)*2)

*VMASK,mask_IF(1)
*VFUN,VELOCITY_IF(1,2+(I-1)*6),COMP,data_full_VIF(1,2+(I-1)*6)

*VMASK,mask_IF(1)
*VFUN,VELOCITY_IF(1,4+(I-1)*6),COMP,data_full_VIF(1,4+(I-1)*6)

*VMASK,mask_IF(1)
*VFUN,VELOCITY_IF(1,6+(I-1)*6),COMP,data_full_VIF(1,6+(I-1)*6)


*VMASK,mask_IF(1)
*VFUN,PRESSURE_IF(1,3+(I-1)*2),COMP,data_full_IF(1,3+(I-1)*2)

*VMASK,mask_IF(1)
*VFUN,VELOCITY_IF(1,3+(I-1)*6),COMP,data_full_VIF(1,3+(I-1)*6)

*VMASK,mask_IF(1)
*VFUN,VELOCITY_IF(1,5+(I-1)*6),COMP,data_full_VIF(1,5+(I-1)*6)

*VMASK,mask_IF(1)
*VFUN,VELOCITY_IF(1,7+(I-1)*6),COMP,data_full_VIF(1,7+(I-1)*6)


*ENDDO

*VMASK,mask_IF(1)
*VFUN,PRESSURE_IF(1,1),COMP,NODES_ID_FULL_IF(1,1)

*VMASK,mask_IF(1)
*VFUN,VELOCITY_IF(1,1),COMP,NODES_ID_FULL_IF(1,1)

*VMASK,mask_IF(1)
*VFUN,nodal_area_input(1,1),COMP,NODES_ID_FULL_IF(1,1)

!NSEL, ALL
!CMSEL ,A, 'input_connected_faces', NODE
*DO,k,1,N_NODES_IF,1

node_id = nodal_area_input(k,1)
nodal_area_input(k,2) = arnode(node_id)

*ENDDO

!!! Exporta os resultados nodais - pressões Re{P} e Im{P}

*MWRITE,PRESSURE_IF,nodal_pressure_input_face,dat
(F10.0,TL1,10000E20.12)

*MWRITE,VELOCITY_IF,particle_velocity_input_face,dat
(F10.0,TL1,10000E20.12)

*MWRITE,nodal_area_input,nodal_area_input_face,dat
(F10.0,TL1,10000E20.12)


!
CMSEL,S,'output_face',NODE
CM,LIST_NODES,NODE
!
*GET,N_NODES_OF,NODE,,COUNT
*GET,N_MAX_OF,NODE,,num,max
!
*DIM,nodal_area_output,ARRAY,N_NODES_OF,2
*DIM,PRESSURE_OF,ARRAY,N_NODES_OF,N_COLF
*DIM,VELOCITY_OF,ARRAY,N_NODES_OF,N_COLV
*DIM,mask_OF,array,N_MAX_OF
*DIM,NODES_NS_OF,ARRAY,N_NODES_OF,1
*DIM,NODES_ID_FULL_OF,ARRAY,N_MAX_OF,1
*DIM,data_full_OF,array,N_MAX_OF,N_COLF
*DIM,data_full_VOF,array,N_MAX_OF,N_COLV
!
*VGET,NODES_NS_OF,NODE,,NLIST
*VGET,mask_OF(1),NODE,,NSEL
*VFILL,NODES_ID_FULL_OF,ramp,1,1

!Harmonic Analysis create a 2*Nf set of results (Real part + Imaginary part)

*DO,I,1,N_FREQ,1

! STORE REAL PART OF DISPLACEMENT

SET,1,I,,0

*GET, frequencies(I,1), ACTIVE, 0, SET, FREQ,

*VMASK,mask_OF(1)
*VGET,data_full_OF(1,2+(I-1)*2),NODE,all,PRESS,

*VMASK,mask_OF(1)
*VGET,data_full_VOF(1,2+(I-1)*6),NODE,all,PG,X

*VMASK,mask_OF(1)
*VGET,data_full_VOF(1,4+(I-1)*6),NODE,all,PG,Y

*VMASK,mask_OF(1)
*VGET,data_full_VOF(1,6+(I-1)*6),NODE,all,PG,Z

! STORE IMAGINARY PART OF DISPLACEMENT

SET,1,I,,1

*VMASK,mask_OF(1)
*VGET,data_full_OF(1,3+(I-1)*2),NODE,all,PRESS,

*VMASK,mask_OF(1)
*VGET,data_full_VOF(1,3+(I-1)*6),NODE,all,PG,X

*VMASK,mask_OF(1)
*VGET,data_full_VOF(1,5+(I-1)*6),NODE,all,PG,Y

*VMASK,mask_OF(1)
*VGET,data_full_VOF(1,7+(I-1)*6),NODE,all,PG,Z


*VMASK,mask_OF(1)
*VFUN,PRESSURE_OF(1,2+(I-1)*2),COMP,data_full_OF(1,2+(I-1)*2)

*VMASK,mask_OF(1)
*VFUN,VELOCITY_OF(1,2+(I-1)*6),COMP,data_full_VOF(1,2+(I-1)*6)

*VMASK,mask_OF(1)
*VFUN,VELOCITY_OF(1,4+(I-1)*6),COMP,data_full_VOF(1,4+(I-1)*6)

*VMASK,mask_OF(1)
*VFUN,VELOCITY_OF(1,6+(I-1)*6),COMP,data_full_VOF(1,6+(I-1)*6)


*VMASK,mask_OF(1)
*VFUN,PRESSURE_OF(1,3+(I-1)*2),COMP,data_full_OF(1,3+(I-1)*2)

*VMASK,mask_OF(1)
*VFUN,VELOCITY_OF(1,3+(I-1)*6),COMP,data_full_VOF(1,3+(I-1)*6)

*VMASK,mask_OF(1)
*VFUN,VELOCITY_OF(1,5+(I-1)*6),COMP,data_full_VOF(1,5+(I-1)*6)

*VMASK,mask_OF(1)
*VFUN,VELOCITY_OF(1,7+(I-1)*6),COMP,data_full_VOF(1,7+(I-1)*6)


*ENDDO

*VMASK,mask_OF(1)
*VFUN,PRESSURE_OF(1,1),COMP,NODES_ID_FULL_OF(1,1)

*VMASK,mask_OF(1)
*VFUN,VELOCITY_OF(1,1),COMP,NODES_ID_FULL_OF(1,1)

*VMASK,mask_OF(1)
*VFUN,nodal_area_output(1,1),COMP,NODES_ID_FULL_OF(1,1)


!NSEL, ALL
!CMSEL ,A, 'output_connected_faces', NODE
*DO,k,1,N_NODES_OF,1

node_id = nodal_area_output(k,1)
nodal_area_output(k,2) = arnode(node_id)

*ENDDO

!!! Exporta os resultados nodais - pressões Re{P} e Im{P}

*MWRITE,PRESSURE_OF,nodal_pressure_output_face,dat
(F10.0,TL1,10000E20.12)

*MWRITE,VELOCITY_OF,particle_velocity_output_face,dat
(F10.0,TL1,10000E20.12)

*MWRITE,nodal_area_output,nodal_area_output_face,dat
(F10.0,TL1,10000E20.12)


!!! Vetor frequencias da Analise Harmonica

*CFOPEN, analysis_frequencies, dat
*VWRITE,frequencies(1,1)
(F10.4)
*CFCLOS

! ****** End   Command Snippet ******
fini
