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/batch
! ANSYS input file written by Workbench version 2023 R1
! File used for geometry attach: C:\FE_models\Fisicas\shell_elements\CAD\piping_example.x_t
/title,validation_project--Harmonic Response (C5)
/COM,/COM,     ANSYSMotion, 2023.1
/com,--- Data in consistent MKS units. See Solving Units in the help system for more information.
/units,MKS
/prep7
! Turn off shape checking because checks already performed inside WB mesher.
! See help system for more information.
SHPP,OFF,,NOWARN
etcon,set             ! allow ANSYS to choose best KEYOP's for 180x elements, resets any applicable keyopt to MAPDL defaults
/com,*********** Nodes for the whole assembly ***********
nblock,3,,11238
(1i9,3e20.9e3)
        1     2.300000000E+00    -1.250000000E-01     2.250000000E+00
        2     2.300000000E+00    -1.213531785E-01     2.220026577E+00
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-1
/com,*********** Elements for Body 1 "Part 1" ***********
et,1,181
keyo,1,1,0       ! bending and membrane stiffness
keyo,1,3,2
eblock,19,solid,,20389
(19i9)
        1        1        1        1        0        0        0        0        4        0        1      310      335     8061     8061
        1        1        1        1        0        0        0        0        4        0        2      361      336     8060     8060
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-1
/com,*********** Send User Defined Coordinate System(s) ***********
csys,0
toffst,273.15,  ! Temperature offset from absolute zero
/com,*********** Set Reference Temperature ***********
tref,22.
/com,*********** Send Materials ***********
Temperature = 'TEMP' ! Temperature
MP,DENS,1,7850,	! kg m^-3
MP,C,1,434,	! J kg^-1 C^-1
MP,KXX,1,60.5,	! W m^-1 C^-1
MP,RSVX,1,1.7e-07,	! kg m^3 A^-2 s^-3
MP,EX,1,200000000000,	! Pa
MP,NUXY,1,0.3,
MP,MURX,1,10000,

/com,*********** Send Sheet Properties ***********
sectype,1,shell
secdata,8.e-003
secoff,mid

!************************* Model Summary ********************
!Part 1,	Structural Steel,	matid,	1
!************************* End Model Summary ********************
/com,*********** Send Named Selection as Node Component ***********
CMBLOCK,INPUT_FACE,NODE,      287
(8i10)
       310       311       312       313       314       315       316       317
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/com,*********** Send Named Selection as Node Component ***********
CMBLOCK,OUTPUT_FACE,NODE,      172
(8i10)
       381       382       383       384       385       386       387       388
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/com,*********** Send Named Selection as Node Component ***********
CMBLOCK,TOP_LEFT_FACE,NODE,      649
(8i10)
       169       170       171       172       173       174       175       176
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/com,*********** Send Named Selection as Node Component ***********
CMBLOCK,TOP_RIGHT_FACE,NODE,      650
(8i10)
       117       118       119       120       121       122       123       124
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/com,*********** Send Named Selection as Node Component ***********
CMBLOCK,BRANCH1_TOP_FACE,NODE,       18
(8i10)
       564       565       566       567       568       569       570       571
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/com,*********** Send Named Selection as Node Component ***********
CMBLOCK,BRANCH2_TOP_FACE,NODE,       18
(8i10)
       576       577       578       579       580       581       582       583
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/com,*********** Fixed Supports ***********
CMBLOCK,_FIXEDSU,NODE,      459
(8i10)
       310       311       312       313       314       315       316       317
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cmsel,s,_FIXEDSU
d,all,all
nsel,all
/com,*********** Define Pressure Vector Using Surface Effect Elements ***********
local,12,0,0.,0.,0.,0.,0.,0.
csys,0
et,2,154
mat,2
eblock,10,,,1246
(15i9)
    20390        2        2        2       12      219     1689      218      218
    20391        2        2        2       12     1689     1684     1690     1690
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-1
esel,s,type,,2
keyop,2,2,1                ! Apply load in local coordinate system
keyop,2,7,0                ! Use deformed area for application of load
esel,all

*DIM,_loadvari318x,TABLE,1,1,1,TIME
! Time values
*TAXIS,_loadvari318x(1),1,1.
! Load values
_loadvari318x(1,1,1) = 100.


*DIM,_loadvari318xi,TABLE,1,1,1,TIME
! Time values
*TAXIS,_loadvari318xi(1),1,1.
! Load values
_loadvari318xi(1,1,1) = 0.


*DIM,_loadvari318y,TABLE,1,1,1,TIME
! Time values
*TAXIS,_loadvari318y(1),1,1.
! Load values
_loadvari318y(1,1,1) = 0.


*DIM,_loadvari318yi,TABLE,1,1,1,TIME
! Time values
*TAXIS,_loadvari318yi(1),1,1.
! Load values
_loadvari318yi(1,1,1) = 0.


*DIM,_loadvari318z,TABLE,1,1,1,TIME
! Time values
*TAXIS,_loadvari318z(1),1,1.
! Load values
_loadvari318z(1,1,1) = 0.


*DIM,_loadvari318zi,TABLE,1,1,1,TIME
! Time values
*TAXIS,_loadvari318zi(1),1,1.
! Load values
_loadvari318zi(1,1,1) = 0.


esel,s,type,,2
nsle
sfe,all,1,pres,1,%_loadvari318x%
sfe,all,2,pres,1,%_loadvari318y%
sfe,all,1,pres,2,%_loadvari318xi%
sfe,all,2,pres,2,%_loadvari318yi%
sfe,all,3,pres,1,%_loadvari318z%
sfe,all,3,pres,2,%_loadvari318zi%
nsel,all
esel,all
fini
/solu
antype,harm
hropt,auto
thexpand,off     ! ignore thermal strains
kbc,1
harfrq,0,300
nsub,150
alphad,1.e-003      ! Alpha damping
betad,1.e-007       ! Beta damping, frequency dependent
outres,erase
outres,all,none
outres,nsol,all
outres,eangl,all
outres,etmp,all
outres,veng,all
outres,strs,all
outres,epel,all
outres,rsol,all
outres,cont,all
! *********** WB SOLVE COMMAND ***********
! check interactive state
*get,ANSINTER_,active,,int
*if,ANSINTER_,ne,0,then
/eof
*endif
solve
/com *************** Write FE CONNECTORS *********
CEWRITE,file,ce,,INTE
fini
*get,_NSOLTHREADS,active,0,ntfs
*get,_NSOLPROCESSES,active,0,npfs
/post1
fini
