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/batch
! ANSYS input file written by Workbench version 2023 R2
! File used for geometry attach: C:\FE_models\Validacoes\TET10\elemento_quadratico_files\dp0\SYS-6\DM\SYS-6.scdoc
/title,elemento_quadratico--Modal Acoustics (G5)
/COM,/COM,     ANSYSMotion, 2023.2
/com,--- Data in consistent MKS units. See Solving Units in the help system for more information.
/units,MKS
/prep7
! Turn off shape checking because checks already performed inside WB mesher.
! See help system for more information.
SHPP,OFF,,NOWARN
etcon,set             ! allow ANSYS to choose best KEYOP's for 180x elements, resets any applicable keyopt to MAPDL defaults
/com,*********** Nodes for the whole assembly ***********
nblock,3,,24
(1i9,3e20.9e3)
        1    -5.000000000E-01     5.000000000E-01     0.000000000E+00
        2    -5.000000000E-01    -5.000000000E-01     1.000000000E+00
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-1
/com,*********** Elements for Body 1 "SYS-6\Corte-extrus_o1" ***********
et,1,221
r,1,2.e-005,101325.
keyo,1,2,1          ! uncoupled acoustic element without FSI
keyo,1,6,2          ! ignore damping matrix for fluid
eblock,19,solid,,4
(19i9)
        1        1        1        1        0        0        0        0       10        0        1        4        7        6        5       19       22       18       17
       21       20
        1        1        1        1        0        0        0        0       10        0        2        3        4        7        6       14       19       16       15
       18       22
        1        1        1        1        0        0        0        0       10        0        3        1        4        7        3        9       19       10        8
       14       16
        1        1        1        1        0        0        0        0       10        0        4        2        6        4        3       13       18       12       11
       15       14
-1
/com,*********** Send User Defined Coordinate System(s) ***********
csys,0
toffst,273.15,  ! Temperature offset from absolute zero
/com,*********** Set Reference Temperature ***********
tref,22.
/com,*********** Send Materials ***********
MP,MURX,1,1,
MP,DENS,1,1.204263,	! kg m^-3
MP,SONC,1,343.395034,	! m s^-1
MP,VISC,1,1.8247e-05,	! Pa s
MP,KXX,1,0.025503,	! W m^-1 C^-1
MP,C,1,1006.400178,	! J kg^-1 C^-1

!************************* Model Summary ********************
!SYS-6\Corte-extrus_o1,	Air,	matid,	1
!************************* End Model Summary ********************
/com,*********** Send Named Selection as Element Component ***********
esel,s,type,,1
cm,NONE,elem
esel,all
/com,*********** Send Named Selection as Node Component ***********
CMBLOCK,INPUT_FACE,NODE,        9
(8i10)
         2         4         5         6        12        13        17        18
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/com,*********** Send Named Selection as Node Component ***********
CMBLOCK,OUTPUT_FACE,NODE,        9
(8i10)
         1         2         3         4         8         9        11        12
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fini
/solu
antype,2                   ! modal analysis
_thickRatio=  0     ! Ratio of thick parts in the model
modopt,lanb,12,0.,100000000.
outres,erase
outres,all,none
outres,nsol,all
outres,eangl,all
outres,veng,all
mxpand,,,,yes,,no             ! expand requested element results, but not write them to file.mode
! ****** Begin Command Snippet ******
!   Commands inserted into this file will be executed just prior to the ANSYS SOLVE command.
!   These commands may supersede command settings set by Workbench.

!   Active UNIT system in Workbench when this object was created:  Metric (m, kg, N, s, V, A)
!   NOTE:  Any data that requires units (such as mass) is assumed to be in the consistent solver unit system.
!                See Solving Units in the help system for more information.


!   Commands inserted into this file will be executed immediately after the ANSYS /POST1 command.

!   Active UNIT system in Workbench when this object was created:  Metric (m, kg, N, s, V, A)
!   NOTE:  Any data that requires units (such as mass) is assumed to be in the consistent solver unit system.
!                See Solving Units in the help system for more information.

! ****** End   Command Snippet ******
! *********** WB SOLVE COMMAND ***********
! check interactive state
*get,ANSINTER_,active,,int
*if,ANSINTER_,ne,0,then
/eof
*endif
solve
/com *************** Write FE CONNECTORS *********
CEWRITE,file,ce,,INTE
*get,_nmodalsolproc,active,0,numcpu
fini
*get,_NSOLTHREADS,active,0,ntfs
*get,_NSOLPROCESSES,active,0,npfs
/post1
*dim,_direction,CHAR,6,1
_direction(1) = 'X'
_direction(2) = 'Y'
_direction(3) = 'Z'
_direction(4) = 'ROTX'
_direction(5) = 'ROTY'
_direction(6) = 'ROTZ'
*get,_lastLS,active,0,set,LSTP
*get,_beginset,active,0,set,nset,first,_lastLS
*get,_endset,active,0,set,nset,last,_lastLS
_nummodes = 0
*if,_endset,gt,0,then
_nummodes = _endset - _beginset + 1
*endif
*do,i_mode,1,_nummodes
   *do,j_component,1,6
			*get,PFACT_%i_mode%_%j_component%,MODE,%i_mode%,PFACT,,DIREC,_direction(%j_component%)
   *enddo
*enddo
*dim,_tmdirection,CHAR,6,1
_tmdirection(1) = 'X'
_tmdirection(2) = 'Y'
_tmdirection(3) = 'Z'
_tmdirection(4) = 'X'
_tmdirection(5) = 'Y'
_tmdirection(6) = 'Z'
*do,j_component,1,6
    *if,j_component,gt,3,then
        *get,TOTALMASS_%j_component%,ELEM,0,IOR,_tmdirection(%j_component%)
    *else
        *get,TOTALMASS_%j_component%,ELEM,0,MTOT,_tmdirection(%j_component%)
    *endif
*enddo
! ****** Begin Command Snippet ******
!   Commands inserted into this file will be executed just prior to the ANSYS SOLVE command.
!   These commands may supersede command settings set by Workbench.

!   Active UNIT system in Workbench when this object was created:  Metric (m, kg, N, s, V, A)
!   NOTE:  Any data that requires units (such as mass) is assumed to be in the consistent solver unit system.
!                See Solving Units in the help system for more information.


!   Commands inserted into this file will be executed immediately after the ANSYS /POST1 command.

!   Active UNIT system in Workbench when this object was created:  Metric (m, kg, N, s, V, A)
!   NOTE:  Any data that requires units (such as mass) is assumed to be in the consistent solver unit system.
!                See Solving Units in the help system for more information.

N_MODES = 12

*DIM,nat_frequencies,ARRAY,N_MODES,2
*VFILL,nat_frequencies(1,1),ramp,1,1

!FINISH

*DO,i,1,N_MODES,1

!SET,1,i,,0
!*GET, nat_frequencies(i,2), ACTIVE, 0, SET, FREQ,

*GET,nat_frequencies(i,2),MODE,i,FREQ
*ENDDO

*MWRITE,nat_frequencies,natural_frequencies_Ansys,dat
(F10.0,TL1,10000E20.12)

! ****** End   Command Snippet ******
fini
