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/batch
! ANSYS input file written by Workbench version 2023 R2
! File used for geometry attach: C:\FE_models\Suporte\P79\WB\P79_silencers_files\dp0\SYS-3\DM\SYS-3.scdoc
/title,P79_silencers--Harmonic Acoustics (D5)
/COM,/COM,     ANSYSMotion, 2023.2
/com,--- Data in consistent MKS units. See Solving Units in the help system for more information.
/units,MKS
/prep7
! Turn off shape checking because checks already performed inside WB mesher.
! See help system for more information.
SHPP,OFF,,NOWARN
etcon,set             ! allow ANSYS to choose best KEYOP's for 180x elements, resets any applicable keyopt to MAPDL defaults
/com,*********** Nodes for the whole assembly ***********
nblock,3,,20293
(1i9,3e20.9e3)
        1     3.696686682E-01    -2.948000000E-01     3.610258764E-17
        2     3.696686682E-01    -2.907793122E-01     4.852248521E-02
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-1
/com,*********** Elements for Body 1 "Component1\NONE" ***********
et,1,30
r,1,2.e-005,101325.
keyo,1,2,1          ! uncoupled acoustic element without FSI
eblock,19,solid,,88981
(19i9)
        1        1        1        1        0        0        0        0        8        0        1     7543    17975    18447    18447    18339    18339    18339    18339
        1        1        1        1        0        0        0        0        8        0        2     3221    18447     3222     3222    17975    17975    17975    17975
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-1
/com,*********** Send User Defined Coordinate System(s) ***********
csys,0
toffst,273.15,  ! Temperature offset from absolute zero
/com,*********** Set Reference Temperature ***********
tref,22.
/com,*********** Send Materials ***********
MP,MURX,1,1,

TB,PERF,1,1,,DLB
TBDATA,1,1518.5066
MP,DENS,1,2.634167,	! kg m^-3
MP,SONC,1,225.307464,	! m s^-1
MP,VISC,1,8.1565e-06,	! Pa s
MP,KXX,1,0.017416,	! W m^-1 C^-1
MP,C,1,1664.133942,	! J kg^-1 C^-1

!************************* Model Summary ********************
!Component1\NONE,	stg1_suction porous,	matid,	1
!************************* End Model Summary ********************
/com,*********** Send Named Selection as Element Component ***********
esel,s,type,,1
cm,NONE,elem
esel,all
/com,*********** Send Named Selection as Node Component ***********
CMBLOCK,INPUT_FACE,NODE,       98
(8i10)
        77        78        79        80        81        82        83        84
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/com,*********** Send Named Selection as Node Component ***********
CMBLOCK,OUTPUT_FACE,NODE,      149
(8i10)
        39        40        41        42        43        44        45        46
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
/com,*********** Create Impedance Boundary ***********
CMBLOCK,_CMACOUSTICSFIMPD148,NODE,      247
(8i10)
        39        40        41        42        43        44        45        46
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cmsel,s,_CMACOUSTICSFIMPD148

*DIM,_148ImpedanceResistance,TABLE,280,1,1,FREQ
! Frequency values
*TAXIS,_148ImpedanceResistance(1),1,5.,10.,15.,20.,25.,30.,35.,40.,45.,50.
*TAXIS,_148ImpedanceResistance(11),1,55.,60.,65.,70.,75.,80.,85.,90.,95.,100.
*TAXIS,_148ImpedanceResistance(21),1,105.,110.,115.,120.,125.,130.,135.,140.,145.,150.
*TAXIS,_148ImpedanceResistance(31),1,155.,160.,165.,170.,175.,180.,185.,190.,195.,200.
*TAXIS,_148ImpedanceResistance(41),1,205.,210.,215.,220.,225.,230.,235.,240.,245.,250.
*TAXIS,_148ImpedanceResistance(51),1,255.,260.,265.,270.,275.,280.,285.,290.,295.,300.
*TAXIS,_148ImpedanceResistance(61),1,305.,310.,315.,320.,325.,330.,335.,340.,345.,350.
*TAXIS,_148ImpedanceResistance(71),1,355.,360.,365.,370.,375.,380.,385.,390.,395.,400.
*TAXIS,_148ImpedanceResistance(81),1,405.,410.,415.,420.,425.,430.,435.,440.,445.,450.
*TAXIS,_148ImpedanceResistance(91),1,455.,460.,465.,470.,475.,480.,485.,490.,495.,500.
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*TAXIS,_148ImpedanceResistance(271),1,1355.,1360.,1365.,1370.,1375.,1380.,1385.,1390.,1395.,1400.
! Load values
_148ImpedanceResistance(1,1,1) = 2789.030992
_148ImpedanceResistance(2,1,1) = 1895.354996
_148ImpedanceResistance(3,1,1) = 1552.435739
_148ImpedanceResistance(4,1,1) = 1365.443335
_148ImpedanceResistance(5,1,1) = 1245.901593
_148ImpedanceResistance(6,1,1) = 1162.106875
_148ImpedanceResistance(7,1,1) = 1099.713812
_148ImpedanceResistance(8,1,1) = 1051.228374
_148ImpedanceResistance(9,1,1) = 1012.330799
_148ImpedanceResistance(10,1,1) = 980.3452311
_148ImpedanceResistance(11,1,1) = 953.5202694
_148ImpedanceResistance(12,1,1) = 930.6585458
_148ImpedanceResistance(13,1,1) = 910.9120007
_148ImpedanceResistance(14,1,1) = 893.6621266
_148ImpedanceResistance(15,1,1) = 878.446567
_148ImpedanceResistance(16,1,1) = 864.9123344
_148ImpedanceResistance(17,1,1) = 852.7849878
_148ImpedanceResistance(18,1,1) = 841.8477358
_148ImpedanceResistance(19,1,1) = 831.9269129
_148ImpedanceResistance(20,1,1) = 822.8816612
_148ImpedanceResistance(21,1,1) = 814.5964573
_148ImpedanceResistance(22,1,1) = 806.9756057
_148ImpedanceResistance(23,1,1) = 799.9391171
_148ImpedanceResistance(24,1,1) = 793.4195809
_148ImpedanceResistance(25,1,1) = 787.3597605
_148ImpedanceResistance(26,1,1) = 781.7107239
_148ImpedanceResistance(27,1,1) = 776.4303746
_148ImpedanceResistance(28,1,1) = 771.482286
_148ImpedanceResistance(29,1,1) = 766.8347671
_148ImpedanceResistance(30,1,1) = 762.4601096
_148ImpedanceResistance(31,1,1) = 758.3339742
_148ImpedanceResistance(32,1,1) = 754.4348882
_148ImpedanceResistance(33,1,1) = 750.7438311
_148ImpedanceResistance(34,1,1) = 747.2438901
_148ImpedanceResistance(35,1,1) = 743.9199732
_148ImpedanceResistance(36,1,1) = 740.7585673
_148ImpedanceResistance(37,1,1) = 737.7475355
_148ImpedanceResistance(38,1,1) = 734.8759435
_148ImpedanceResistance(39,1,1) = 732.133913
_148ImpedanceResistance(40,1,1) = 729.5124959
_148ImpedanceResistance(41,1,1) = 727.0035655
_148ImpedanceResistance(42,1,1) = 724.5997241
_148ImpedanceResistance(43,1,1) = 722.2942215
_148ImpedanceResistance(44,1,1) = 720.0808849
_148ImpedanceResistance(45,1,1) = 717.9540582
_148ImpedanceResistance(46,1,1) = 715.908548
_148ImpedanceResistance(47,1,1) = 713.9395768
_148ImpedanceResistance(48,1,1) = 712.0427418
_148ImpedanceResistance(49,1,1) = 710.2139782
_148ImpedanceResistance(50,1,1) = 708.4495273
_148ImpedanceResistance(51,1,1) = 706.7459078
_148ImpedanceResistance(52,1,1) = 705.0998901
_148ImpedanceResistance(53,1,1) = 703.5084741
_148ImpedanceResistance(54,1,1) = 701.9688687
_148ImpedanceResistance(55,1,1) = 700.4784737
_148ImpedanceResistance(56,1,1) = 699.0348637
_148ImpedanceResistance(57,1,1) = 697.6357731
_148ImpedanceResistance(58,1,1) = 696.2790837
_148ImpedanceResistance(59,1,1) = 694.9628119
_148ImpedanceResistance(60,1,1) = 693.6850988
_148ImpedanceResistance(61,1,1) = 692.4442
_148ImpedanceResistance(62,1,1) = 691.2384769
_148ImpedanceResistance(63,1,1) = 690.0663888
_148ImpedanceResistance(64,1,1) = 688.9264856
_148ImpedanceResistance(65,1,1) = 687.817401
_148ImpedanceResistance(66,1,1) = 686.7378465
_148ImpedanceResistance(67,1,1) = 685.6866062
_148ImpedanceResistance(68,1,1) = 684.6625312
_148ImpedanceResistance(69,1,1) = 683.6645352
_148ImpedanceResistance(70,1,1) = 682.6915905
_148ImpedanceResistance(71,1,1) = 681.7427236
_148ImpedanceResistance(72,1,1) = 680.817012
_148ImpedanceResistance(73,1,1) = 679.9135806
_148ImpedanceResistance(74,1,1) = 679.0315988
_148ImpedanceResistance(75,1,1) = 678.1702778
_148ImpedanceResistance(76,1,1) = 677.3288675
_148ImpedanceResistance(77,1,1) = 676.5066548
_148ImpedanceResistance(78,1,1) = 675.7029607
_148ImpedanceResistance(79,1,1) = 674.9171386
_148ImpedanceResistance(80,1,1) = 674.1485724
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_148ImpedanceResistance(280,1,1) = 624.8579818


*DIM,_148ImpedanceReactance,TABLE,280,1,1,FREQ
! Frequency values
*TAXIS,_148ImpedanceReactance(1),1,5.,10.,15.,20.,25.,30.,35.,40.,45.,50.
*TAXIS,_148ImpedanceReactance(11),1,55.,60.,65.,70.,75.,80.,85.,90.,95.,100.
*TAXIS,_148ImpedanceReactance(21),1,105.,110.,115.,120.,125.,130.,135.,140.,145.,150.
*TAXIS,_148ImpedanceReactance(31),1,155.,160.,165.,170.,175.,180.,185.,190.,195.,200.
*TAXIS,_148ImpedanceReactance(41),1,205.,210.,215.,220.,225.,230.,235.,240.,245.,250.
*TAXIS,_148ImpedanceReactance(51),1,255.,260.,265.,270.,275.,280.,285.,290.,295.,300.
*TAXIS,_148ImpedanceReactance(61),1,305.,310.,315.,320.,325.,330.,335.,340.,345.,350.
*TAXIS,_148ImpedanceReactance(71),1,355.,360.,365.,370.,375.,380.,385.,390.,395.,400.
*TAXIS,_148ImpedanceReactance(81),1,405.,410.,415.,420.,425.,430.,435.,440.,445.,450.
*TAXIS,_148ImpedanceReactance(91),1,455.,460.,465.,470.,475.,480.,485.,490.,495.,500.
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*TAXIS,_148ImpedanceReactance(271),1,1355.,1360.,1365.,1370.,1375.,1380.,1385.,1390.,1395.,1400.
! Load values
_148ImpedanceReactance(1,1,1) = -2952.834178
_148ImpedanceReactance(2,1,1) = -1777.809007
_148ImpedanceReactance(3,1,1) = -1321.253956
_148ImpedanceReactance(4,1,1) = -1070.363141
_148ImpedanceReactance(5,1,1) = -909.0609782
_148ImpedanceReactance(6,1,1) = -795.4856392
_148ImpedanceReactance(7,1,1) = -710.6034208
_148ImpedanceReactance(8,1,1) = -644.432135
_148ImpedanceReactance(9,1,1) = -591.1987977
_148ImpedanceReactance(10,1,1) = -547.3171529
_148ImpedanceReactance(11,1,1) = -510.4340218
_148ImpedanceReactance(12,1,1) = -478.9369972
_148ImpedanceReactance(13,1,1) = -451.681731
_148ImpedanceReactance(14,1,1) = -427.8320711
_148ImpedanceReactance(15,1,1) = -406.7618908
_148ImpedanceReactance(16,1,1) = -387.9924117
_148ImpedanceReactance(17,1,1) = -371.1508407
_148ImpedanceReactance(18,1,1) = -355.942286
_148ImpedanceReactance(19,1,1) = -342.1302094
_148ImpedanceReactance(20,1,1) = -329.5225216
_148ImpedanceReactance(21,1,1) = -317.9614987
_148ImpedanceReactance(22,1,1) = -307.3163431
_148ImpedanceReactance(23,1,1) = -297.4776097
_148ImpedanceReactance(24,1,1) = -288.3529708
_148ImpedanceReactance(25,1,1) = -279.8639586
_148ImpedanceReactance(26,1,1) = -271.9434284
_148ImpedanceReactance(27,1,1) = -264.5335644
_148ImpedanceReactance(28,1,1) = -257.5842948
_148ImpedanceReactance(29,1,1) = -251.0520226
_148ImpedanceReactance(30,1,1) = -244.898599
_148ImpedanceReactance(31,1,1) = -239.0904884
_148ImpedanceReactance(32,1,1) = -233.5980833
_148ImpedanceReactance(33,1,1) = -228.3951383
_148ImpedanceReactance(34,1,1) = -223.4583007
_148ImpedanceReactance(35,1,1) = -218.7667176
_148ImpedanceReactance(36,1,1) = -214.3017061
_148ImpedanceReactance(37,1,1) = -210.0464747
_148ImpedanceReactance(38,1,1) = -205.9858872
_148ImpedanceReactance(39,1,1) = -202.1062606
_148ImpedanceReactance(40,1,1) = -198.3951931
_148ImpedanceReactance(41,1,1) = -194.8414155
_148ImpedanceReactance(42,1,1) = -191.4346632
_148ImpedanceReactance(43,1,1) = -188.1655653
_148ImpedanceReactance(44,1,1) = -185.0255483
_148ImpedanceReactance(45,1,1) = -182.0067518
_148ImpedanceReactance(46,1,1) = -179.1019549
_148ImpedanceReactance(47,1,1) = -176.3045121
_148ImpedanceReactance(48,1,1) = -173.6082956
_148ImpedanceReactance(49,1,1) = -171.0076459
_148ImpedanceReactance(50,1,1) = -168.4973271
_148ImpedanceReactance(51,1,1) = -166.0724873
_148ImpedanceReactance(52,1,1) = -163.7286238
_148ImpedanceReactance(53,1,1) = -161.4615519
_148ImpedanceReactance(54,1,1) = -159.2673767
_148ImpedanceReactance(55,1,1) = -157.1424683
_148ImpedanceReactance(56,1,1) = -155.0834391
_148ImpedanceReactance(57,1,1) = -153.0871242
_148ImpedanceReactance(58,1,1) = -151.1505625
_148ImpedanceReactance(59,1,1) = -149.2709809
_148ImpedanceReactance(60,1,1) = -147.4457788
_148ImpedanceReactance(61,1,1) = -145.6725155
_148ImpedanceReactance(62,1,1) = -143.9488973
_148ImpedanceReactance(63,1,1) = -142.2727666
_148ImpedanceReactance(64,1,1) = -140.6420921
_148ImpedanceReactance(65,1,1) = -139.0549592
_148ImpedanceReactance(66,1,1) = -137.5095619
_148ImpedanceReactance(67,1,1) = -136.0041948
_148ImpedanceReactance(68,1,1) = -134.5372465
_148ImpedanceReactance(69,1,1) = -133.1071929
_148ImpedanceReactance(70,1,1) = -131.7125912
_148ImpedanceReactance(71,1,1) = -130.3520747
_148ImpedanceReactance(72,1,1) = -129.0243476
_148ImpedanceReactance(73,1,1) = -127.7281805
_148ImpedanceReactance(74,1,1) = -126.462406
_148ImpedanceReactance(75,1,1) = -125.2259152
_148ImpedanceReactance(76,1,1) = -124.0176534
_148ImpedanceReactance(77,1,1) = -122.8366173
_148ImpedanceReactance(78,1,1) = -121.6818517
_148ImpedanceReactance(79,1,1) = -120.5524465
_148ImpedanceReactance(80,1,1) = -119.4475341
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_148ImpedanceReactance(280,1,1) = -47.74406362


sf,_CMAcousticSFIMPD148,impd,%_148ImpedanceResistance%,%_148ImpedanceReactance%       ! Impedance
allsel,all


/com,*********** Begin Program Controlled Acoustic Far-field Radiation Surface ***********

esel,s,type,,1
CMBLOCK,_CM_EQV_SRC_SURFACE188,NODE,      247
(8i10)
        39        40        41        42        43        44        45        46
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cmsel,s,_CM_EQV_SRC_SURFACE188
sf,_CM_EQV_SRC_SURFACE188,mxwf,
allsel,all


/com,*********** End Program Controlled Acoustic Far-field Radiation Surface ***********


/com,*********** Create Acoustic Port ***********
esel,s,type,,1
CMBLOCK,_CM_PORT_SURFACE51,NODE,       98
(8i10)
        77        78        79        80        81        82        83        84
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cmsel,s,_CM_PORT_SURFACE51
sf,all,port,51
allsel,all


/com,*********** Create Acoustic Port ***********
esel,s,type,,1
CMBLOCK,_CM_PORT_SURFACE54,NODE,      149
(8i10)
        39        40        41        42        43        44        45        46
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cmsel,s,_CM_PORT_SURFACE54
sf,all,port,52
allsel,all


/com,*********** Create Surface Velocity ***********
CMBLOCK,_CMACOUSTICSURFVELO57,NODE,       98
(8i10)
        77        78        79        80        81        82        83        84
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cmsel,s,_CMACOUSTICSURFVELO57
sf,_CMAcousticSURFVELO57,shld,1,0
allsel,all

fini
/solu
antype,harm
hropt,auto
thexpand,off     ! ignore thermal strains
kbc,1
harfrq,0,1400
nsub,280
asol,scat,off
outres,erase
outres,all,none
outres,nsol,all
outres,eangl,all
outres,etmp,all
outres,veng,all
esel,s,mat,,1
cm,_elmisc,elem
esel,all
outres,misc,all,_elmisc
outres,fgrad,all
! *********** WB SOLVE COMMAND ***********
! check interactive state
*get,ANSINTER_,active,,int
*if,ANSINTER_,ne,0,then
/eof
*endif
solve
/com *************** Write FE CONNECTORS *********
CEWRITE,file,ce,,INTE
fini
*get,_NSOLTHREADS,active,0,ntfs
*get,_NSOLPROCESSES,active,0,npfs
/post1
fini
