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/batch
! ANSYS input file written by Workbench version 2023 R2
! File used for geometry attach: C:\Users\Petro3_ii\AppData\Local\Temp\tubo_tet.tmp\tubo_tet_files\dp0\Geom\DM\Geom.scdoc
/title,tubo_tet--Harmonic Acoustics (B5)
/COM,/COM,     ANSYSMotion, 2023.2
/COM,/COM,     BoltTools, 2023.2
/COM,/COM,     MotionLoads, 2022.2
/COM,/COM,     VariableLoad, 2022.2
/com,--- Data in consistent MKS units. See Solving Units in the help system for more information.
/units,MKS
/prep7
! Turn off shape checking because checks already performed inside WB mesher.
! See help system for more information.
SHPP,OFF,,NOWARN
etcon,set             ! allow ANSYS to choose best KEYOP's for 180x elements, resets any applicable keyopt to MAPDL defaults
/com,*********** Nodes for the whole assembly ***********
nblock,3,,2173
(1i9,3e20.9e3)
        1     5.000000000E-01     5.125000000E-01    -1.530808499E-18
        2     5.000000000E-01     5.101127124E-01    -7.347315654E-03
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-1
/com,*********** Elements for Body 1 "Geom\Solid" ***********
et,1,30
r,1,2.e-005,101325.
keyo,1,2,1          ! uncoupled acoustic element without FSI
eblock,19,solid,,7463
(19i9)
        1        1        1        1        0        0        0        0        8        0        1     1221     1810     1976     1976     1960     1960     1960     1960
        1        1        1        1        0        0        0        0        8        0        2     1221     1719     1976     1976     1810     1810     1810     1810
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-1
/com,*********** Send User Defined Coordinate System(s) ***********
csys,0
toffst,273.15,  ! Temperature offset from absolute zero
/com,*********** Set Reference Temperature ***********
tref,22.
/com,*********** Send Materials ***********
MP,MURX,1,1,
MP,DENS,1,1.18,	! kg m^-3
MP,SONC,1,343,	! m s^-1

!************************* Model Summary ********************
!Geom\Solid,	AirLavo,	matid,	1
!************************* End Model Summary ********************
/com,*********** Send Named Selection as Node Component ***********
CMBLOCK,INLET_FACE,NODE,       14
(8i10)
        11        12        13        14        15        16        17        18
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/com,*********** Send Named Selection as Node Component ***********
CMBLOCK,OUTLET_FACE,NODE,       14
(8i10)
         1         2         3         4         5         6         7         8
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
/com,*********** Create Impedance Boundary ***********
CMBLOCK,_CMACOUSTICSFIMPD43,NODE,       14
(8i10)
         1         2         3         4         5         6         7         8
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cmsel,s,_CMACOUSTICSFIMPD43
sf,_CMAcousticSFIMPD43,impd,404.74,0       ! Impedance
allsel,all


/com,*********** Create Surface Velocity ***********
CMBLOCK,_CMACOUSTICSURFVELO41,NODE,       14
(8i10)
        11        12        13        14        15        16        17        18
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cmsel,s,_CMACOUSTICSURFVELO41
sf,_CMAcousticSURFVELO41,shld,1,0
allsel,all

fini
/solu
antype,harm
hropt,full
thexpand,off     ! ignore thermal strains
kbc,1
harfrq,0,500
nsub,500
asol,scat,off
outres,erase
outres,all,none
outres,nsol,all
outres,eangl,all
outres,etmp,all
outres,veng,all
outres,fgrad,all
! *********** WB SOLVE COMMAND ***********
! check interactive state
*get,ANSINTER_,active,,int
*if,ANSINTER_,ne,0,then
/eof
*endif
solve
/com *************** Write FE CONNECTORS *********
CEWRITE,file,ce,,INTE
fini
*get,_NSOLTHREADS,active,0,ntfs
*get,_NSOLPROCESSES,active,0,npfs
/post1
fini
