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/batch
! ANSYS input file written by Workbench version 2023 R2
! File used for geometry attach: C:\Users\Petro3_ii\Desktop\Validacoes\Vibra\hex8_extra_shape_function\CAD\cuboid_example.STEP
/title,cuboide_hex8_esf--Modal (A5)
/COM,/COM,     ANSYSMotion, 2023.2
/com,--- Data in consistent MKS units. See Solving Units in the help system for more information.
/units,MKS
/prep7
! Turn off shape checking because checks already performed inside WB mesher.
! See help system for more information.
SHPP,OFF,,NOWARN
etcon,set             ! allow ANSYS to choose best KEYOP's for 180x elements, resets any applicable keyopt to MAPDL defaults
/com,*********** Nodes for the whole assembly ***********
nblock,3,,7984
(1i9,3e20.9e3)
        1     8.996665648E-01     2.517174856E-02     1.988835144E-01
        2     9.248812830E-01     2.512857944E-02     1.736180997E-01
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-1
/com,*********** Elements for Body 1 "cuboid_example-FreeParts|Ressalto-extrus_o1" ***********

ET,1,SOLID45

KEYOPT,1,1,0
KEYOPT,1,2,0
KEYOPT,1,4,0
KEYOPT,1,5,0
KEYOPT,1,6,0

eblock,19,solid,,5760
(19i9)
        1        1        1        1        0        0        0        0        8        0        1     1940     1943     1946     1942     2642     2650     2685     2682
        1        1        1        1        0        0        0        0        8        0        2     1922     1924     1943     1940     2644     2678     2650     2642
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-1
/com,*********** Send User Defined Coordinate System(s) ***********
csys,0
toffst,273.15,  ! Temperature offset from absolute zero
/com,*********** Set Reference Temperature ***********
tref,22.
/com,*********** Send Materials ***********
Temperature = 'TEMP' ! Temperature
MP,DENS,1,7850,	! kg m^-3
MP,C,1,434,	! J kg^-1 C^-1
MP,KXX,1,60.5,	! W m^-1 C^-1
MP,RSVX,1,1.7e-07,	! kg m^3 A^-2 s^-3
MP,EX,1,200000000000,	! Pa
MP,NUXY,1,0.3,
MP,MURX,1,10000,

!************************* Model Summary ********************
!cuboid_example-FreeParts|Ressalto-extrus_o1,	Structural Steel,	matid,	1
!************************* End Model Summary ********************
/com,*********** Send Named Selection as Node Component ***********
CMBLOCK,INPUT_FACE,NODE,      119
(8i10)
      4724      4725      4726      4730      4742      4843      4844      5151
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/com,*********** Send Named Selection as Node Component ***********
CMBLOCK,OUTPUT_FACE,NODE,      119
(8i10)
      4721      4722      4723      4729      4735      4805      4806      5148
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/com,*********** Fixed Supports ***********
CMBLOCK,_FIXEDSU,NODE,      119
(8i10)
      4724      4725      4726      4730      4742      4843      4844      5151
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cmsel,s,_FIXEDSU
d,all,all
nsel,all
fini

/solu
antype,2                   ! modal analysis
_thickRatio=  1     ! Ratio of thick parts in the model
modopt,lanb,40
outres,erase
outres,all,none
outres,nsol,all
mxpand                    ! default expand in case of complex solution

solve
/com *************** Write FE CONNECTORS *********
CEWRITE,file,ce,,INTE
*get,_nmodalsolproc,active,0,numcpu
fini

/POST1

N_MODES = 40
*DIM, natural_frequencies, ARRAY, N_MODES, 2

*DO,j,1,N_MODES,1

*GET,natural_frequencies(j,2),MODE,j,FREQ

*ENDDO

*DIM,MODES_INDEXES,ARRAY,N_MODES,1
*VFILL, MODES_INDEXES, ramp, 1, 1

*VFUN, natural_frequencies(1,1), COMP, MODES_INDEXES(1,1)

*MWRITE, natural_frequencies, hex8_natural_frequencies, dat
(F10.0,TL1,10000E20.12)

FINISH
