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/batch
! ANSYS input file written by Workbench version 2023 R2
! File used for geometry attach: C:\Users\Petro3_ii\Desktop\Validacoes\Vibra\hex8_extra_shape_function\CAD\cuboid_example.STEP
/title,cuboide_hex8_esf--Harmonic Response (B5)
/COM,/COM,     ANSYSMotion, 2023.2
/com,--- Data in consistent MKS units. See Solving Units in the help system for more information.
/units,MKS
/prep7
! Turn off shape checking because checks already performed inside WB mesher.
! See help system for more information.
SHPP,OFF,,NOWARN
!etcon,set             ! allow ANSYS to choose best KEYOP's for 180x elements, resets any applicable keyopt to MAPDL defaults
/com,*********** Nodes for the whole assembly ***********
nblock,3,,7984
(1i9,3e20.9e3)
        1     8.996665648E-01     2.517174856E-02     1.988835144E-01
        2     9.248812830E-01     2.512857944E-02     1.736180997E-01
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-1
/com,*********** Elements for Body 1 "cuboid_example-FreeParts|Ressalto-extrus_o1" ***********
!
et,1,SOLID185
!
KEYOPT,1,2,0
KEYOPT,1,3,0
KEYOPT,1,6,0
KEYOPT,1,8,0
!
eblock,19,solid,,5760
(19i9)
        1        1        1        1        0        0        0        0        8        0        1     1940     1943     1946     1942     2642     2650     2685     2682
        1        1        1        1        0        0        0        0        8        0        2     1922     1924     1943     1940     2644     2678     2650     2642
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-1
/com,*********** Send User Defined Coordinate System(s) ***********
csys,0
toffst,273.15,  ! Temperature offset from absolute zero
/com,*********** Set Reference Temperature ***********
tref,22.
/com,*********** Send Materials ***********
Temperature = 'TEMP' ! Temperature
MP,DENS,1,7850,	! kg m^-3
MP,C,1,434,	! J kg^-1 C^-1
MP,KXX,1,60.5,	! W m^-1 C^-1
MP,RSVX,1,1.7e-07,	! kg m^3 A^-2 s^-3
MP,EX,1,200000000000,	! Pa
MP,NUXY,1,0.3,
MP,MURX,1,10000,

!************************* Model Summary ********************
!cuboid_example-FreeParts|Ressalto-extrus_o1,	Structural Steel,	matid,	1
!************************* End Model Summary ********************
/com,*********** Send Named Selection as Node Component ***********
CMBLOCK,INPUT_FACE,NODE,      119
(8i10)
      4724      4725      4726      4730      4742      4843      4844      5151
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/com,*********** Send Named Selection as Node Component ***********
CMBLOCK,OUTPUT_FACE,NODE,      119
(8i10)
      4721      4722      4723      4729      4735      4805      4806      5148
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/com,*********** Send Named Selection as Element Component ***********
esel,s,type,,1
cm,MAIN_BODY,elem
esel,all
/com,*********** Fixed Supports ***********
CMBLOCK,_FIXEDSU,NODE,      119
(8i10)
      4724      4725      4726      4730      4742      4843      4844      5151
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

cmsel,s,INPUT_FACE
D,ALL,ALL,
nsel,all
esel,all

cmsel,s,OUTPUT_FACE
F,ALL,FY,1,
F,ALL,FZ,1,
nsel,all
esel,all

N_FREQ = 20

/solu
antype,harm
hropt,full
thexpand,off     ! ignore thermal strains
kbc,1
harfrq,0,2000
nsub,N_FREQ
outres,erase
outres,all,none
outres,nsol,all
outres,eangl,all
outres,etmp,all
outres,veng,all
outres,strs,all
outres,epel,all
outres,rsol,all
outres,cont,all

EMATWRITE, YES
WRFULL,YES

SOLVE

FINISH

/POST1

N_COL = 1 + 6*N_FREQ

!
*dim,ratio,ARRAY,N_FREQ,1
*DIM,frequencies,ARRAY,N_FREQ,1
!
ESEL, ALL
NSEL, ALL
!
!CMSEL,S,'input_face',NODE
CM,LIST_NODES,NODE
!
*GET,N_NODES,NODE,,COUNT
*GET,N_MAX,NODE,,num,max
!
*DIM,DISPLACEMENS,ARRAY,N_NODES,N_COL
*DIM,mask_U,array,N_MAX
*DIM,NODES_NS_U,ARRAY,N_NODES,1
*DIM,NODES_ID_FULL_U,ARRAY,N_MAX,1
*DIM,data_full_U,array,N_MAX,N_COL
!
*VGET,NODES_NS_U,NODE,,NLIST
*VGET,mask_U(1),NODE,,NSEL
*VFILL,NODES_ID_FULL_U,ramp,1,1

!Harmonic Analysis create a 2*Nf set of results (Real part + Imaginary part)

*DO,I,1,N_FREQ,1

! STORE REAL PART OF DISPLACEMENT

SET,1,I,,0

*GET, frequencies(I,1), ACTIVE, 0, SET, FREQ,

*VMASK,mask_U(1)
*VGET,data_full_U(1,2+(I-1)*6),NODE,all,U,X

*VMASK,mask_U(1)
*VGET,data_full_U(1,4+(I-1)*6),NODE,all,U,Y

*VMASK,mask_U(1)
*VGET,data_full_U(1,6+(I-1)*6),NODE,all,U,Z

! STORE IMAGINARY PART OF DISPLACEMENT

SET,1,I,,1

*VMASK,mask_U(1)
*VGET,data_full_U(1,3+(I-1)*6),NODE,all,U,X

*VMASK,mask_U(1)
*VGET,data_full_U(1,5+(I-1)*6),NODE,all,U,Y

*VMASK,mask_U(1)
*VGET,data_full_U(1,7+(I-1)*6),NODE,all,U,Z


*VMASK,mask_U(1)
*VFUN,DISPLACEMENS(1,2+(I-1)*6),COMP,data_full_U(1,2+(I-1)*6)

*VMASK,mask_U(1)
*VFUN,DISPLACEMENS(1,4+(I-1)*6),COMP,data_full_U(1,4+(I-1)*6)

*VMASK,mask_U(1)
*VFUN,DISPLACEMENS(1,6+(I-1)*6),COMP,data_full_U(1,6+(I-1)*6)


*VMASK,mask_U(1)
*VFUN,DISPLACEMENS(1,3+(I-1)*6),COMP,data_full_U(1,3+(I-1)*6)

*VMASK,mask_U(1)
*VFUN,DISPLACEMENS(1,5+(I-1)*6),COMP,data_full_U(1,5+(I-1)*6)

*VMASK,mask_U(1)
*VFUN,DISPLACEMENS(1,7+(I-1)*6),COMP,data_full_U(1,7+(I-1)*6)

*ENDDO

*VMASK,mask_U(1)
*VFUN,DISPLACEMENS(1,1),COMP,NODES_ID_FULL_U(1,1)


!!! Exporta os resultados nodais - pressões Re{P} e Im{P}

*MWRITE,DISPLACEMENS,nodal_displacements_reference,dat
(F10.0,TL1,10000E20.12)


!
ESEL, ALL
NSEL, ALL

!CMSEL,S,'input_face',NODE
CM,LIST_NODES,NODE
!
*GET,N_NODES,NODE,,COUNT
*GET,N_MAX,NODE,,num,max
!
*DIM,STRESSES,ARRAY,N_NODES,N_COL
*DIM,mask_S,array,N_MAX
*DIM,NODES_NS_S,ARRAY,N_NODES,1
*DIM,NODES_ID_FULL_S,ARRAY,N_MAX,1
*DIM,data_full_S,array,N_MAX,N_COL
!
*VGET,NODES_NS_S,NODE,,NLIST
*VGET,mask_S(1),NODE,,NSEL
*VFILL,NODES_ID_FULL_S,ramp,1,1

!Harmonic Analysis create a 2*Nf set of results (Real part + Imaginary part)

*DO,I,1,N_FREQ,1

! STORE REAL PART OF DISPLACEMENT

SET,1,I,,0

*GET, frequencies(I,1), ACTIVE, 0, SET, FREQ,

*VMASK,mask_S(1)
*VGET,data_full_S(1,2+(I-1)*6),NODE,all,S,X

*VMASK,mask_S(1)
*VGET,data_full_S(1,4+(I-1)*6),NODE,all,S,Y

*VMASK,mask_S(1)
*VGET,data_full_S(1,6+(I-1)*6),NODE,all,S,Z

! STORE IMAGINARY PART OF DISPLACEMENT

SET,1,I,,1

*VMASK,mask_S(1)
*VGET,data_full_S(1,3+(I-1)*6),NODE,all,S,X

*VMASK,mask_S(1)
*VGET,data_full_S(1,5+(I-1)*6),NODE,all,S,Y

*VMASK,mask_S(1)
*VGET,data_full_S(1,7+(I-1)*6),NODE,all,S,Z


*VMASK,mask_S(1)
*VFUN,STRESSES(1,2+(I-1)*6),COMP,data_full_S(1,2+(I-1)*6)

*VMASK,mask_S(1)
*VFUN,STRESSES(1,4+(I-1)*6),COMP,data_full_S(1,4+(I-1)*6)

*VMASK,mask_S(1)
*VFUN,STRESSES(1,6+(I-1)*6),COMP,data_full_S(1,6+(I-1)*6)


*VMASK,mask_S(1)
*VFUN,STRESSES(1,3+(I-1)*6),COMP,data_full_S(1,3+(I-1)*6)

*VMASK,mask_S(1)
*VFUN,STRESSES(1,5+(I-1)*6),COMP,data_full_S(1,5+(I-1)*6)

*VMASK,mask_S(1)
*VFUN,STRESSES(1,7+(I-1)*6),COMP,data_full_S(1,7+(I-1)*6)

*ENDDO

*VMASK,mask_S(1)
*VFUN,STRESSES(1,1),COMP,NODES_ID_FULL_S(1,1)


!!! Exporta os resultados nodais - pressões Re{P} e Im{P}

*MWRITE,STRESSES,nodal_stresses_reference,dat
(F10.0,TL1,10000E20.12)


!!! Vetor frequencias da Analise Harmonica

*CFOPEN, analysis_frequencies, dat
*VWRITE,frequencies(1,1)
(F10.4)
*CFCLOS

FINISH

/POST26
FILE,'file','rst','.'
/UI,COLL,1
NUMVAR,200
SOLU,191,NCMIT
STORE,MERGE
PLCPLX,0
PRCPLX,1
FILLDATA,191,,,,1,1
REALVAR,191,191

NSOL,2,6200,U,Y, UY_3,
STORE,MERGE


XVAR,1
PLVAR,2,

!   Commands inserted into this file will be executed immediately after the ANSYS /POST1 command.

!   Active UNIT system in Workbench when this object was created:  Metric (m, kg, N, s, V, A)
!   NOTE:  Any data that requires units (such as mass) is assumed to be in the consistent solver unit system.
!                See Solving Units in the help system for more information.
