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/batch
! ANSYS input file written by Workbench version 2023 R2
! File used for geometry attach: C:\Users\Petro3_ii\Desktop\Validacoes\CAD\rectangular_cavity.STEP
/title,cuboide_hex8_esf--Modal (F5)
/COM,/COM,     ANSYSMotion, 2023.2
/com,--- Data in consistent MKS units. See Solving Units in the help system for more information.
/units,MKS
/prep7
! Turn off shape checking because checks already performed inside WB mesher.
! See help system for more information.
SHPP,OFF,,NOWARN
etcon,set             ! allow ANSYS to choose best KEYOP's for 180x elements, resets any applicable keyopt to MAPDL defaults
/com,*********** Nodes for the whole assembly ***********
nblock,3,,33
(1i9,3e20.9e3)
        1     2.000000000E+00     0.000000000E+00     0.000000000E+00
        2     2.000000000E+00     5.000000000E-01     0.000000000E+00
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-1
/com,*********** Elements for Body 1 "rectangular_cavity-FreeParts|Ressalto-extrus_o1" ***********
!
et,1,SOLID45
!
KEYOPT,1,1,0
KEYOPT,1,2,0
KEYOPT,1,4,0
KEYOPT,1,5,0
KEYOPT,1,6,0
!
eblock,19,solid,,8
(19i9)
        1        1        1        1        0        0        0        0        8        0        1       11       12       25       26       13       14       21       29
        1        1        1        1        0        0        0        0        8        0        2       13       16       15       14       29       28       22       21
        1        1        1        1        0        0        0        0        8        0        3        1       26       25        2        3       29       21        4
        1        1        1        1        0        0        0        0        8        0        4        3        4        5        6       29       21       22       28
        1        1        1        1        0        0        0        0        8        0        5       15       16       19       18       22       28       27       23
        1        1        1        1        0        0        0        0        8        0        6        5        8        9        6       22       23       27       28
        1        1        1        1        0        0        0        0        8        0        7       17       20       30       24       18       19       27       23
        1        1        1        1        0        0        0        0        8        0        8        7       24       30       10        8       23       27        9
-1
/com,*********** Send User Defined Coordinate System(s) ***********
csys,0
toffst,273.15,  ! Temperature offset from absolute zero
/com,*********** Set Reference Temperature ***********
tref,22.
/com,*********** Send Materials ***********
Temperature = 'TEMP' ! Temperature
MP,DENS,1,7850,	! kg m^-3
MP,C,1,434,	! J kg^-1 C^-1
MP,KXX,1,60.5,	! W m^-1 C^-1
MP,RSVX,1,1.7e-07,	! kg m^3 A^-2 s^-3
MP,EX,1,200000000000,	! Pa
MP,NUXY,1,0.3,
MP,MURX,1,10000,

!************************* Model Summary ********************
!rectangular_cavity-FreeParts|Ressalto-extrus_o1,	Structural Steel,	matid,	1
!************************* End Model Summary ********************
/com,*********** Send Named Selection as Node Component ***********
CMBLOCK,INPUT_FACE,NODE,        6
(8i10)
         7        10        17        20        24        30
/com,*********** Send Named Selection as Node Component ***********
CMBLOCK,OUTPUT_FACE,NODE,        6
(8i10)
         1         2        11        12        25        26
/solu
antype,2                   ! modal analysis
_thickRatio=  1     ! Ratio of thick parts in the model
modopt,lanb,6
outres,erase
outres,all,none
outres,nsol,all
outres,eangl,all
outres,etmp,all
outres,veng,all
outres,strs,all
outres,epel,all
outres,rsol,all
outres,cont,all
mxpand                    ! default expand in case of complex solution

EMATWRITE, YES
WRFULL,YES

SOLVE
/com *************** Write FE CONNECTORS *********
CEWRITE,file,ce,,INTE
*get,_nmodalsolproc,active,0,numcpu

FINISH

!/POST1
/AUX2

! commands to create dense matrix

*DO, n_el, 1, 6, 1

*DMAT, MatK, D, IMPORT, EMAT, file.emat, STIFF, n_el
*EXPORT, MatK, MMF, Ke_%n_el%_ansys.txt,

*DMAT, MatM, D, IMPORT, EMAT, file.emat, MASS, n_el
*EXPORT, MatM, MMF, Me_%n_el%_ansys.txt,

*ENDDO

! Stiffness global matrix
!*DMAT,K_dense,D,IMPORT,FULL,file.full,STIFF
!*EXPORT,K_dense,CSV,Ke_ansys.csv,24,
!*PRINT,K_dense,Kdense_full.dat

! Mass global matrix
!*DMAT,M_dense,D,IMPORT,FULL,file.full,MASS
!*EXPORT,M_dense,CSV,Me_ansys.csv,24,
!*PRINT,M_dense,Mdense_full.dat

FINISH
