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/batch
! ANSYS input file written by Workbench version 2023 R2
! File used for geometry attach: C:\FE_models\Validacoes\structural_integrations\CAD\twisted_quadrangular_section.STEP
/title,structural_element_2d_and_1d_integration--Harmonic Response (C5)
/COM,/COM,     ANSYSMotion, 2023.2
/com,--- Data in consistent MKS units. See Solving Units in the help system for more information.
/units,MKS
/prep7
! Turn off shape checking because checks already performed inside WB mesher.
! See help system for more information.
SHPP,OFF,,NOWARN
etcon,set             ! allow ANSYS to choose best KEYOP's for 180x elements, resets any applicable keyopt to MAPDL defaults
/com,*********** Nodes for the whole assembly ***********
nblock,3,,8990
(1i9,3e20.9e3)
        1     1.045844872E+00     3.186473541E-03     4.660138646E-02
        2     6.261182221E-01     2.919840021E-02    -3.409758563E-02
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-1
/com,*********** Elements for Body 1 "twisted_quadrangular_section-FreeParts|Varredura2" ***********
et,1,186
keyo,1,2,1          ! set full integration on SOLID186
eblock,19,solid,,1560
(19i9)
        1        1        1        1        0        0        0        0       20        0        1       39       40       99       98      128      127      180      182
     2412     2418     2664     2413     2759     2760     2951     2764     2414     2419     2668     2665
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-1
/com,*********** Send User Defined Coordinate System(s) ***********
csys,0
toffst,273.15,  ! Temperature offset from absolute zero
/com,*********** Set Reference Temperature ***********
tref,22.
/com,*********** Send Materials ***********
Temperature = 'TEMP' ! Temperature
MP,DENS,1,7850,	! kg m^-3
MP,C,1,434,	! J kg^-1 C^-1
MP,KXX,1,60.5,	! W m^-1 C^-1
MP,RSVX,1,1.7e-07,	! kg m^3 A^-2 s^-3
MP,EX,1,200000000000,	! Pa
MP,NUXY,1,0.3,
MP,MURX,1,10000,

!************************* Model Summary ********************
!twisted_quadrangular_section-FreeParts|Varredura2,	Structural Steel,	matid,	1
!************************* End Model Summary ********************
/com,*********** Send Named Selection as Node Component ***********
CMBLOCK,INPUT_FACE,NODE,      113
(8i10)
      1021      1022      1023      1024      1025      1026      1027      1028
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/com,*********** Send Named Selection as Node Component ***********
CMBLOCK,OUTPUT_FACE,NODE,      113
(8i10)
      1063      1064      1065      1066      1067      1068      1069      1070
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/com,*********** Send Named Selection as Node Component ***********
CMBLOCK,SIDE_FACE,NODE,      198
(8i10)
      1379      1472      1487      1488      1489      1490      1728      1730
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/com,*********** Fixed Supports ***********
CMBLOCK,_FIXEDSU,NODE,      113
(8i10)
      1021      1022      1023      1024      1025      1026      1027      1028
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cmsel,s,_FIXEDSU
d,all,all
nsel,all
/com,*********** Define Force Without Surface Effect Elements "Force" ***********
local,12,0,0.,0.,0.,0.,0.,0.
csys,0
CMBLOCK,_CM38_3 ,ELEM,       10
(8i10)
      1100      1114      1129      1521      1524      1546      1552      1556
      1559      1560
CMBLOCK,_CM38_4 ,ELEM,        8
(8i10)
      1101      1115      1127      1522      1523      1529      1541      1548

CMBLOCK,_CM38_6 ,ELEM,       12
(8i10)
      1102      1103      1104      1105      1106      1107      1110      1111
      1119      1120      1121      1126

*DIM,_loadvari38x,TABLE,1,1,1,TIME
! Time values
*TAXIS,_loadvari38x(1),1,1.
! Load values
_loadvari38x(1,1,1) = 0.


*DIM,_loadvari38xi,TABLE,1,1,1,TIME
! Time values
*TAXIS,_loadvari38xi(1),1,1.
! Load values
_loadvari38xi(1,1,1) = 0.


*DIM,_loadvari38y,TABLE,1,1,1,TIME
! Time values
*TAXIS,_loadvari38y(1),1,1.
! Load values
_loadvari38y(1,1,1) = -2083.33333333622


*DIM,_loadvari38yi,TABLE,1,1,1,TIME
! Time values
*TAXIS,_loadvari38yi(1),1,1.
! Load values
_loadvari38yi(1,1,1) = 0.


*DIM,_loadvari38z,TABLE,1,1,1,TIME
! Time values
*TAXIS,_loadvari38z(1),1,1.
! Load values
_loadvari38z(1,1,1) = 0.


*DIM,_loadvari38zi,TABLE,1,1,1,TIME
! Time values
*TAXIS,_loadvari38zi(1),1,1.
! Load values
_loadvari38zi(1,1,1) = 0.


/com,*********** Set Force Without Surface Effect Elements "Force" ***********
sfco,1,0,12,,,,,1		! set and send X component tables
sfe,_CM38_3,3,pres,1,%_loadvari38x%
sfe,_CM38_4,4,pres,1,%_loadvari38x%
sfe,_CM38_6,6,pres,1,%_loadvari38x%
sfe,_CM38_3,3,pres,2,%_loadvari38xi%
sfe,_CM38_4,4,pres,2,%_loadvari38xi%
sfe,_CM38_6,6,pres,2,%_loadvari38xi%
sfco,1,1,12,,,,,1		! set and send Y component tables
sfe,_CM38_3,3,pres,1,%_loadvari38y%
sfe,_CM38_4,4,pres,1,%_loadvari38y%
sfe,_CM38_6,6,pres,1,%_loadvari38y%
sfe,_CM38_3,3,pres,2,%_loadvari38yi%
sfe,_CM38_4,4,pres,2,%_loadvari38yi%
sfe,_CM38_6,6,pres,2,%_loadvari38yi%
sfco,1,2,12,,,,,1		! set and send Z component tables
sfe,_CM38_3,3,pres,1,%_loadvari38z%
sfe,_CM38_4,4,pres,1,%_loadvari38z%
sfe,_CM38_6,6,pres,1,%_loadvari38z%
sfe,_CM38_3,3,pres,2,%_loadvari38zi%
sfe,_CM38_4,4,pres,2,%_loadvari38zi%
sfe,_CM38_6,6,pres,2,%_loadvari38zi%
nsel,all
esel,all
sfco,none		! resets the sfcontrol
fini
/solu
antype,harm
hropt,full
thexpand,off     ! ignore thermal strains
kbc,1
harfrq,0,1200
nsub,20
outres,erase
outres,all,none
outres,nsol,all
outres,eangl,all
outres,etmp,all
outres,veng,all
outres,strs,all
outres,epel,all
outres,rsol,all
outres,cont,all
! *********** WB SOLVE COMMAND ***********
! check interactive state
*get,ANSINTER_,active,,int
*if,ANSINTER_,ne,0,then
/eof
*endif
solve
/com *************** Write FE CONNECTORS *********
CEWRITE,file,ce,,INTE
fini
*get,_NSOLTHREADS,active,0,ntfs
*get,_NSOLPROCESSES,active,0,npfs
/post1
! ****** Begin Command Snippet ******
!   Commands inserted into this file will be executed immediately after the ANSYS /POST1 command.

!   Active UNIT system in Workbench when this object was created:  Metric (m, kg, N, s, V, A)
!   NOTE:  Any data that requires units (such as mass) is assumed to be in the consistent solver unit system.
!                See Solving Units in the help system for more information.


N_FREQ = 20
N_COL = 1 + 6*N_FREQ

!
*dim,ratio,ARRAY,N_FREQ,1
*DIM,frequencies,ARRAY,N_FREQ,1
!
ESEL, ALL
NSEL, ALL
!
!CMSEL,S,'input_face',NODE
CM,LIST_NODES,NODE
!
*GET,N_NODES,NODE,,COUNT
*GET,N_MAX,NODE,,num,max
!
*DIM,DISPLACEMENS,ARRAY,N_NODES,N_COL
*DIM,mask_U,array,N_MAX
*DIM,NODES_NS_U,ARRAY,N_NODES,1
*DIM,NODES_ID_FULL_U,ARRAY,N_MAX,1
*DIM,data_full_U,array,N_MAX,N_COL
!
*VGET,NODES_NS_U,NODE,,NLIST
*VGET,mask_U(1),NODE,,NSEL
*VFILL,NODES_ID_FULL_U,ramp,1,1

!Harmonic Analysis create a 2*Nf set of results (Real part + Imaginary part)

*DO,I,1,N_FREQ,1

! STORE REAL PART OF DISPLACEMENT

SET,1,I,,0

*GET, frequencies(I,1), ACTIVE, 0, SET, FREQ,

*VMASK,mask_U(1)
*VGET,data_full_U(1,2+(I-1)*6),NODE,all,U,X

*VMASK,mask_U(1)
*VGET,data_full_U(1,4+(I-1)*6),NODE,all,U,Y

*VMASK,mask_U(1)
*VGET,data_full_U(1,6+(I-1)*6),NODE,all,U,Z

! STORE IMAGINARY PART OF DISPLACEMENT

SET,1,I,,1

*VMASK,mask_U(1)
*VGET,data_full_U(1,3+(I-1)*6),NODE,all,U,X

*VMASK,mask_U(1)
*VGET,data_full_U(1,5+(I-1)*6),NODE,all,U,Y

*VMASK,mask_U(1)
*VGET,data_full_U(1,7+(I-1)*6),NODE,all,U,Z


*VMASK,mask_U(1)
*VFUN,DISPLACEMENS(1,2+(I-1)*6),COMP,data_full_U(1,2+(I-1)*6)

*VMASK,mask_U(1)
*VFUN,DISPLACEMENS(1,4+(I-1)*6),COMP,data_full_U(1,4+(I-1)*6)

*VMASK,mask_U(1)
*VFUN,DISPLACEMENS(1,6+(I-1)*6),COMP,data_full_U(1,6+(I-1)*6)


*VMASK,mask_U(1)
*VFUN,DISPLACEMENS(1,3+(I-1)*6),COMP,data_full_U(1,3+(I-1)*6)

*VMASK,mask_U(1)
*VFUN,DISPLACEMENS(1,5+(I-1)*6),COMP,data_full_U(1,5+(I-1)*6)

*VMASK,mask_U(1)
*VFUN,DISPLACEMENS(1,7+(I-1)*6),COMP,data_full_U(1,7+(I-1)*6)

*ENDDO

*VMASK,mask_U(1)
*VFUN,DISPLACEMENS(1,1),COMP,NODES_ID_FULL_U(1,1)


!!! Exporta os resultados nodais - pressões Re{P} e Im{P}

*MWRITE,DISPLACEMENS,nodal_displacements_reference,dat
(F10.0,TL1,10000E20.12)


!
ESEL, ALL
NSEL, ALL

!CMSEL,S,'input_face',NODE
CM,LIST_NODES,NODE
!
*GET,N_NODES,NODE,,COUNT
*GET,N_MAX,NODE,,num,max
!
*DIM,STRESSES,ARRAY,N_NODES,N_COL
*DIM,mask_S,array,N_MAX
*DIM,NODES_NS_S,ARRAY,N_NODES,1
*DIM,NODES_ID_FULL_S,ARRAY,N_MAX,1
*DIM,data_full_S,array,N_MAX,N_COL
!
*VGET,NODES_NS_S,NODE,,NLIST
*VGET,mask_S(1),NODE,,NSEL
*VFILL,NODES_ID_FULL_S,ramp,1,1

!Harmonic Analysis create a 2*Nf set of results (Real part + Imaginary part)

*DO,I,1,N_FREQ,1

! STORE REAL PART OF DISPLACEMENT

SET,1,I,,0

*GET, frequencies(I,1), ACTIVE, 0, SET, FREQ,

*VMASK,mask_S(1)
*VGET,data_full_S(1,2+(I-1)*6),NODE,all,S,X

*VMASK,mask_S(1)
*VGET,data_full_S(1,4+(I-1)*6),NODE,all,S,Y

*VMASK,mask_S(1)
*VGET,data_full_S(1,6+(I-1)*6),NODE,all,S,Z

! STORE IMAGINARY PART OF DISPLACEMENT

SET,1,I,,1

*VMASK,mask_S(1)
*VGET,data_full_S(1,3+(I-1)*6),NODE,all,S,X

*VMASK,mask_S(1)
*VGET,data_full_S(1,5+(I-1)*6),NODE,all,S,Y

*VMASK,mask_S(1)
*VGET,data_full_S(1,7+(I-1)*6),NODE,all,S,Z


*VMASK,mask_S(1)
*VFUN,STRESSES(1,2+(I-1)*6),COMP,data_full_S(1,2+(I-1)*6)

*VMASK,mask_S(1)
*VFUN,STRESSES(1,4+(I-1)*6),COMP,data_full_S(1,4+(I-1)*6)

*VMASK,mask_S(1)
*VFUN,STRESSES(1,6+(I-1)*6),COMP,data_full_S(1,6+(I-1)*6)


*VMASK,mask_S(1)
*VFUN,STRESSES(1,3+(I-1)*6),COMP,data_full_S(1,3+(I-1)*6)

*VMASK,mask_S(1)
*VFUN,STRESSES(1,5+(I-1)*6),COMP,data_full_S(1,5+(I-1)*6)

*VMASK,mask_S(1)
*VFUN,STRESSES(1,7+(I-1)*6),COMP,data_full_S(1,7+(I-1)*6)

*ENDDO

*VMASK,mask_S(1)
*VFUN,STRESSES(1,1),COMP,NODES_ID_FULL_S(1,1)


!!! Exporta os resultados nodais - pressões Re{P} e Im{P}

*MWRITE,STRESSES,nodal_stresses_reference,dat
(F10.0,TL1,10000E20.12)


!!! Vetor frequencias da Analise Harmonica

*CFOPEN, analysis_frequencies, dat
*VWRITE,frequencies(1,1)
(F10.4)
*CFCLOS

FINISH
! ****** End   Command Snippet ******
fini
